// SBML level 2 version 4

model untitled()

  // Compartments:
  compartment cOne = 1 volume;

  // Species:
  species pp1 in cOne; pp1 is "PP1";
  species rvsf in cOne = 0; rvsf is "RVSF";
  species prvsf in cOne; prvsf is "phosphorylated RVSF";
  species pp2a in cOne; pp2a is "PP2A";
  species melt in cOne; melt is "MELT";
  species pmelt in cOne = 0; pmelt is "phosphorylated MELT";
  species bub1 in cOne; bub1 is "BUB1";
  species aurb in cOne; aurb is "AurB";
  species paurb in cOne = 0; paurb is "phosphorylated AurB";
  species mps1 in cOne = 1/cOne; mps1 is "MPS1";
  species pmelt_bub1 in cOne = 0; pmelt_bub1 is "MELT:BUB1";
  species pmelt_bub1_pp2a in cOne = 0; pmelt_bub1_pp2a is "MELT:BUB1:PP2A";
  species rvsf_pp1 in cOne = 0; rvsf_pp1 is "RVSF:PP1";
  species pmelt_tot in cOne; pmelt_tot is "total phosphorylated MELT";

  // Parameters:
  kb_rvsf_pp1 = 1 substance; kb_rvsf_pp1 is "k_b^{RVSF:PP1}";
  kd_rvsf_pp1 = 1 substance; kd_rvsf_pp1 is "k_d^{RVSF:PP1}";
  kb_pmelt_bub1 = 1 substance; kb_pmelt_bub1 is "k_b^{pMELT:BUB1}";
  kd_pmelt_bub1 = 1 substance; kd_pmelt_bub1 is "k_d^{pMELT:BUB1}";
  kb_pmelt_bub1_pp2a = 1 substance; kb_pmelt_bub1_pp2a is "k_b^{pMELT:BUB1:PP2A}";
  kd_pmelt_bub1_pp2a = 1 substance; kd_pmelt_bub1_pp2a is "k_d^{pMELT:BUB1:PP2A}";
  kp_melt = 1 substance; kp_melt is "k_p^{MELT}";
  kdp_melt = 1 substance; kdp_melt is "k_dp^{MELT}";
  kp_rvsf = 1 substance; kp_rvsf is "k_p^{RVSF}";
  kdp_rvsf_pp2a = 1 substance; kdp_rvsf_pp2a is "k_dp^{RVSF (PP2A)}";
  kdp_rvsf_pp1 = 1 substance; kdp_rvsf_pp1 is "k_dp^{RVSF (PP1)}";
  kp_aurb_bub1 = 1 substance; kp_aurb_bub1 is "k_p^{AurB (BUB1)}";
  kp_aurb_aurb = 1 substance; kp_aurb_aurb is "k_p^{AurB (AurB)}";
  kdp_aurb_pp1 = 1 substance; kdp_aurb_pp1 is "k_dp^{AurB (PP1)}";
  kdp_aurb_pp2a = 1 substance; kdp_aurb_pp2a is "k_dp^{AurB (PP2A)}";
  pp1_tot = 10 substance; pp1_tot is "total PP1";
  bub1_tot = 10 substance; bub1_tot is "total BUB1";
  pp2a_tot = 10 substance; pp2a_tot is "total PP2A";
  kln1_tot = 1 substance; kln1_tot is "total KLN1";
  aurb_tot = 1 substance; aurb_tot is "total AurB";

  // Assignment rules:
  pmelt_tot := pmelt + pmelt_bub1 + pmelt_bub1_pp2a;
  pp1 := pp1_tot - rvsf_pp1;
  bub1 := minus(bub1_tot, pmelt_bub1, pmelt_bub1_pp2a);
  pp2a := pp2a_tot - pmelt_bub1_pp2a;
  melt := kln1_tot - (pmelt + pmelt_bub1_pp2a + pmelt_bub1);
  prvsf := kln1_tot - (rvsf + rvsf_pp1);
  aurb := aurb_tot - paurb;

  // Reactions:
  b_rvsf_pp1: rvsf + pp1 => rvsf_pp1; pp1*rvsf*kb_rvsf_pp1; b_rvsf_pp1 is "RVSF:PP1 binding";
  d_kln1_pp1: rvsf_pp1 => rvsf + pp1; rvsf_pp1*kd_rvsf_pp1; d_kln1_pp1 is "RVSF:PP1 dissociation";
  b_pmelt_bub1: pmelt + bub1 => pmelt_bub1; pmelt*bub1*kb_pmelt_bub1; b_pmelt_bub1 is "pMELT:BUB1 binding";
  d_pmelt_bub1: pmelt_bub1 => pmelt + bub1; pmelt_bub1*kd_pmelt_bub1; d_pmelt_bub1 is "pMELT:BUB1 dissociation";
  b_pmelt_bub1_pp2a: pmelt_bub1 + pp2a => pmelt_bub1_pp2a; pmelt_bub1*pp2a*kb_pmelt_bub1_pp2a; b_pmelt_bub1_pp2a is "pMELT:BUB1:PP2A binding";
  d_pmelt_bub1_pp2a: pmelt_bub1_pp2a => pmelt_bub1 + pp2a; pmelt_bub1_pp2a*kd_pmelt_bub1_pp2a; d_pmelt_bub1_pp2a is "pMELT:BUB1:PP2A dissociation";
  p_rvsf: rvsf => prvsf; rvsf*paurb*kp_rvsf; p_rvsf is "RVSF phosphorylation";  // modifiers: aurb
  dp_rvsf_pp2a: prvsf => rvsf; prvsf*pmelt_bub1_pp2a*kdp_rvsf_pp2a; dp_rvsf_pp2a is "RVSF dephosphorylation by PP2A";  // modifiers: pmelt_bub1_pp2a
  dp_rvsf_pp1: prvsf => rvsf; prvsf*kdp_rvsf_pp1*(0.000001 + rvsf_pp1); dp_rvsf_pp1 is "RVSF dephosphorylation by PP1";  // modifiers: rvsf_pp1
  p_melt: melt => pmelt; melt*mps1*kp_melt; p_melt is "MELT phosphorylation";  // modifiers: mps1
  dp_melt: pmelt => ; pmelt*rvsf_pp1*kdp_melt; dp_melt is "MELT dephosphorylation";  // modifiers: rvsf_pp1
  p_aurb_bub1: aurb => paurb; aurb*pmelt_bub1*kp_aurb_bub1; p_aurb_bub1 is "AurB phosphorylation by BUB1";  // modifiers: pmelt_bub1
  p_aurb_aurb: aurb => paurb; aurb*kp_aurb_aurb*(0.000001 + paurb); p_aurb_aurb is "AurB phosphorylation by itself";
  dp_aurb_pp2a: paurb => aurb; paurb*pmelt_bub1_pp2a*kdp_aurb_pp2a; dp_aurb_pp2a is "AurB dephosphorylation by PP2A";  // modifiers: pmelt_bub1_pp2a
  dp_aurb_pp1: paurb => aurb; paurb*rvsf_pp1*kdp_aurb_pp1; dp_aurb_pp1 is "AurB dephosphorylation by PP1";  // modifiers: rvsf_pp1

  // Unit definitions:
  unit substance = mole;
  unit volume = litre;
  unit area = metre^2;
  unit length = metre;
  unit time = second;
end
